<?xml version="1.0"?>
<?xml-stylesheet type="text/xsl" href="http://jsbsim.sourceforge.net/JSBSim.xsl"?>

<fdm_config name="f18" version="2.0" release="ALPHA"
  xmlns:xsi="http://www.w3.org/2001/XMLSchema-instance"
  xsi:noNamespaceSchemaLocation="http://jsbsim.sourceforge.net/JSBSim.xsd">

  <fileheader>
    <author> SammySkycrafts,Mathias Froehlich, StuartC </author>
    <version>1.0</version>
    <description> Models an F/A-18 </description>
  </fileheader>

  <metrics>
    <wingarea unit="FT2"> 400.00 </wingarea>
    <wingspan unit="FT"> 37.50 </wingspan>
    <wing_incidence unit="DEG"> 2.00 </wing_incidence>
    <chord unit="FT"> 10.83 </chord>
    <htailarea unit="FT2"> 88.06 </htailarea>
    <htailarm unit="FT"> 22.40 </htailarm>
    <vtailarea unit="FT2"> 104.20 </vtailarea>
    <vtailarm unit="FT"> 22.40 </vtailarm>
    <location name="AERORP" unit="IN">
      <x> 403.20 </x>
      <y> 0.00 </y>
      <z> 0.00 </z>
    </location>
    <location name="EYEPOINT" unit="IN">
      <x> 3.5 </x>
      <y> 0.00 </y>
      <z> 1.4 </z>
    </location>
    <location name="VRP" unit="IN">
      <x> 0.0 </x>
      <y> 0.0 </y>
      <z> -10.0 </z>
    </location>
  </metrics>

  <mass_balance>
    <ixx unit="SLUG*FT2"> 22040.00 </ixx>
    <iyy unit="SLUG*FT2"> 124554.00 </iyy>
    <izz unit="SLUG*FT2"> 139382.00 </izz>
    <emptywt unit="LBS"> 23832.00 </emptywt>
    <location name="CG" unit="IN">
      <x> 394.30 </x>
      <y> 0.00 </y>
      <z> -16.80 </z>
    </location>
    <pointmass name="Payload">
      <description> 20258.80 LBS should bring model up to entered max weight </description>
      <weight unit="LBS"> 10129.40 </weight>
      <location name="POINTMASS" unit="IN">
        <x> 394.30 </x>
        <y> 0.00 </y>
        <z> -16.80 </z>
      </location>
    </pointmass>
  </mass_balance>

  <propulsion>

    <engine file="F404-GE-402">
      <location unit="IN">
        <x> 612.00 </x>
        <y> -20.00 </y>
        <z> 0.00 </z>
      </location>
      <orient unit="DEG">
        <pitch> 0.00 </pitch>
        <roll> 0.00 </roll>
        <yaw> 0.00 </yaw>
      </orient>
      <feed> 0 </feed>

      <thruster file="direct">
        <sense> 1 </sense>
        <location unit="IN">
          <x> 612.00 </x>
          <y> -20.00 </y>
          <z> 0.00 </z>
        </location>
        <orient unit="DEG">
          <pitch> 0.00 </pitch>
          <roll> 0.00 </roll>
          <yaw> 0.00 </yaw>
        </orient>
      </thruster>
    </engine>

    <engine file="F404-GE-402">
      <location unit="IN">
        <x> 612.00 </x>
        <y> 20.00 </y>
        <z> 0.00 </z>
      </location>
      <orient unit="DEG">
        <pitch> 0.00 </pitch>
        <roll> 0.00 </roll>
        <yaw> 0.00 </yaw>
      </orient>
      <feed> 1 </feed>

      <thruster file="direct">
        <sense> 1 </sense>
        <location unit="IN">
          <x> 612.00 </x>
          <y> 20.00 </y>
          <z> 0.00 </z>
        </location>
        <orient unit="DEG">
          <pitch> 0.00 </pitch>
          <roll> 0.00 </roll>
          <yaw> 0.00 </yaw>
        </orient>
      </thruster>
    </engine>

    <tank type="FUEL" number="0">
      <location unit="IN">
        <x> 394.30 </x>
        <y> 0.00 </y>
        <z> -16.80 </z>
      </location>
      <capacity unit="LBS"> 3836.40 </capacity>
      <contents unit="LBS"> 1918.20 </contents>
    </tank>
    <tank type="FUEL" number="1">
      <location unit="IN">
        <x> 394.30 </x>
        <y> 0.00 </y>
        <z> -16.80 </z>
      </location>
      <capacity unit="LBS"> 3836.40 </capacity>
      <contents unit="LBS"> 1918.20 </contents>
    </tank>
    <tank type="FUEL" number="2">
      <location unit="IN">
        <x> 394.30 </x>
        <y> 0.00 </y>
        <z> -16.80 </z>
      </location>
      <capacity unit="LBS"> 3836.40 </capacity>
      <contents unit="LBS"> 1918.20 </contents>
    </tank>

  </propulsion>

  <ground_reactions>

    <contact type="BOGEY" name="NOSE">
      <location unit="IN">
        <x> 87.36 </x>
        <y> 0.00 </y>
        <z> -80.64 </z>
      </location>
      <static_friction> 0.80 </static_friction>
      <dynamic_friction> 0.50 </dynamic_friction>
      <rolling_friction> 0.02 </rolling_friction>
      <spring_coeff unit="LBS/FT"> 16680.00 </spring_coeff>
      <damping_coeff unit="LBS/FT/SEC"> 8340.00 </damping_coeff>
      <max_steer unit="DEG"> 5.00 </max_steer>
      <brake_group> NONE </brake_group>
      <retractable> 1 </retractable>
    </contact>

  <contact type="BOGEY" name="LEFT_MAIN">
      <location unit="IN">
        <x> 410.08 </x>
        <y> -40.50 </y>
        <z> -80.64 </z>
      </location>
      <static_friction> 0.80 </static_friction>
      <dynamic_friction> 0.50 </dynamic_friction>
      <rolling_friction> 0.02 </rolling_friction>
      <spring_coeff unit="LBS/FT"> 55600.00 </spring_coeff>
      <damping_coeff unit="LBS/FT/SEC"> 27800.00 </damping_coeff>
      <max_steer unit="DEG">0</max_steer>
      <brake_group> LEFT </brake_group>
      <retractable> 1 </retractable>
    </contact>

  <contact type="BOGEY" name="RIGHT_MAIN">
      <location unit="IN">
        <x> 410.08 </x>
        <y> 40.50 </y>
        <z> -80.64 </z>
      </location>
      <static_friction> 0.80 </static_friction>
      <dynamic_friction> 0.50 </dynamic_friction>
      <rolling_friction> 0.02 </rolling_friction>
      <spring_coeff unit="LBS/FT"> 55600.00 </spring_coeff>
      <damping_coeff unit="LBS/FT/SEC"> 27800.00 </damping_coeff>
      <max_steer unit="DEG">0</max_steer>
      <brake_group> RIGHT </brake_group>
      <retractable> 1 </retractable>
    </contact>

  <contact type="STRUCTURE" name="LEFT_WING">
      <location unit="IN">
        <x> 394.30 </x>
        <y> -225.00 </y>
        <z> -16.80 </z>
      </location>
      <static_friction> 1 </static_friction>
      <dynamic_friction> 1 </dynamic_friction>
      <spring_coeff unit="LBS/FT"> 55600.00 </spring_coeff>
      <damping_coeff unit="LBS/FT/SEC"> 55600.00 </damping_coeff>
    </contact>

  <contact
      type="STRUCTURE" name="RIGHT_WING">
      <location unit="IN">
        <x> 394.30 </x>
        <y> 225.00 </y>
        <z> -16.80 </z>
      </location>
      <static_friction> 1 </static_friction>
      <dynamic_friction> 1 </dynamic_friction>
      <spring_coeff unit="LBS/FT"> 55600.00 </spring_coeff>
      <damping_coeff unit="LBS/FT/SEC"> 55600.00 </damping_coeff>
    </contact>

  </ground_reactions>

  <system file="Propulsion.xml" />
  <system file="Aircraftcontrol.xml" />
  <system file="LandingGear.xml" />
  <system file="Flaps.xml" />
  <system file="Speedbrake.xml" />
  <system file="ArrestorHook.xml" />
  <system file="Catapult.xml" />

  <flight_control name="FCS: f18">

  </flight_control>

  <aerodynamics file="f18aerodynamics.xml" />

  <external_reactions>

    <force name="hook" frame="BODY">
      <location unit="FT">
        <x> 23.601 </x>
        <y> 0 </y>
        <z> -1.1334</z>
      </location>
      <direction>
        <x>-0.9995</x>
        <y> 0 </y>
        <z> 0.01 </z>
      </direction>
    </force>

  <force name="catapult" frame="BODY">
      <location unit="IN">
        <x> 87.36 </x>
        <y> 0 </y>
        <z> -80.64 </z>
      </location>
      <direction>
        <x> 1 </x>
        <y> 0 </y>
        <z> 0 </z>
      </direction>
    </force>

  </external_reactions>

</fdm_config>
